<?xml version="1.0"?>
<?xml-stylesheet type="text/xsl" href="http://jsbsim.sourceforge.net/JSBSim.xsl"?>
<fdm_config name="BaronB58" version="2.0" release="ALPHA"
   xmlns:xsi="http://www.w3.org/2001/XMLSchema-instance"
   xsi:noNamespaceSchemaLocation="http://jsbsim.sourceforge.net/JSBSim.xsd">

 <fileheader>
  <author> Aeromatic v 0.96 </author>
  <filecreationdate>2018-09-22</filecreationdate>
  <version>$Revision: 1.20 $</version>
  <description> Models a BaronB58. </description>
 </fileheader>

<!--
  File:     BaronB58.xml
  Inputs:
    name:          BaronB58
    type:          light twin
    max weight:    5500.0 lb
    wing span:     38.0 ft
    length:        29.9 ft
    wing area:     unspecified
    gear type:     tricycle
    castering:
    retractable?:  yes
    # engines:     2
    engine type:   piston
    engine layout: wings
  Outputs:
    wing loading:  29.00 lb/sq-ft
    payload:       1050.5 lbs
    CL-alpha:      4.8 per radian
    CL-0:          0.24
    CL-max:        1.3
    CD-0:          0.025
    K:             0.041

-->

 <metrics>
   <wingarea  unit="FT2">  189.66 </wingarea>
   <wingspan  unit="FT" >   38.00 </wingspan>
   <wing_incidence>          2.00 </wing_incidence>
   <chord     unit="FT" >    4.99 </chord>
   <htailarea unit="FT2">   30.34 </htailarea>
   <htailarm  unit="FT" >   14.95 </htailarm>
   <vtailarea unit="FT2">   34.14 </vtailarea>
   <vtailarm  unit="FT" >   14.95 </vtailarm>
   <location name="AERORP" unit="IN">
     <x> 179.40 </x>
     <y>   0.00 </y>
     <z>   0.00 </z>
   </location>
   <location name="EYEPOINT" unit="IN">
     <x>  61.00 </x>
     <y> -18.00 </y>
     <z>  45.00 </z>
   </location>
   <location name="VRP" unit="IN">
     <x>0</x>
     <y>0</y>
     <z>0</z>
   </location>
 </metrics>

 <mass_balance>
    <ixx unit="SLUG*FT2">      2814 </ixx>
    <iyy unit="SLUG*FT2">      2928 </iyy>
    <izz unit="SLUG*FT2">      6239 </izz>
    <emptywt unit="LBS" >      4000 </emptywt>
    <location name="CG" unit="IN">
        <x> 179.40 </x>
        <y>   0.00 </y>
        <z>  -8.97 </z>
    </location>

	<pointmass name="Pilot">
		<description>Pilot</description>
		<weight unit="LBS"> 200.00 </weight>
		<location name="Pilot" unit="M">
			<x> 5.50 </x>
			<y> -2.60 </y>
			<z>  0.00 </z>
		</location>
	</pointmass>

	<pointmass name="Copilot">
		<description>Copilot</description>
		<weight unit="LBS"> 200.00 </weight>
		<location name="Copilot" unit="M">
			<x> 5.50 </x>
			<y>  2.60 </y>
			<z>  0.00 </z>
		</location>
	</pointmass>

   <pointmass name="Payload">
    <description> 300 LBS + full (1164 LBS) fuel should bring model up to entered max weight</description>
    <weight unit="LBS"> 300.0 </weight>
    <location name="POINTMASS" unit="IN">
      <x> 69.40 </x>
      <y>   0.00 </y>
      <z>  -8.97 </z>
    </location>
  </pointmass>
 </mass_balance>

 <ground_reactions>

  <contact type="BOGEY" name="NOSE">
   <location unit="IN">
     <x>  46.64 </x>
     <y>   0.00 </y>
     <z> -43.86 </z>
   </location>
   <static_friction>  0.80 </static_friction>
   <dynamic_friction> 0.50 </dynamic_friction>
   <rolling_friction> 0.02 </rolling_friction>
   <spring_coeff unit="LBS/FT"> 3600 </spring_coeff>
   <damping_coeff unit="LBS/FT/SEC"> 1200 </damping_coeff>
<!--   <spring_coeff unit="LBS/FT">       1650.00 </spring_coeff>
   <damping_coeff unit="LBS/FT/SEC">   825.00 </damping_coeff> -->
   <max_steer unit="DEG"> 30.00 </max_steer>
   <brake_group>NONE</brake_group>
   <retractable>1</retractable>
  </contact>

  <contact type="BOGEY" name="LEFT_MAIN">
   <location unit="IN">
     <x> 186.58 </x>
     <y> -41.04 </y>
     <z> -48.86 </z>
   </location>
   <static_friction>  0.80 </static_friction>
   <dynamic_friction> 0.50 </dynamic_friction>
   <rolling_friction> 0.02 </rolling_friction>
<!--   <spring_coeff unit="LBS/FT">       5500.00 </spring_coeff>
   <damping_coeff unit="LBS/FT/SEC">  2750.00 </damping_coeff> -->
   <spring_coeff unit="LBS/FT">       5400.00 </spring_coeff>
   <damping_coeff unit="LBS/FT/SEC">  1750.00 </damping_coeff>
   <max_steer unit="DEG">0</max_steer>
   <brake_group>LEFT</brake_group>
   <retractable>1</retractable>
  </contact>

  <contact type="BOGEY" name="RIGHT_MAIN">
   <location unit="IN">
     <x> 186.58 </x>
     <y>  41.04 </y>
     <z> -48.86 </z>
   </location>
   <static_friction>  0.80 </static_friction>
   <dynamic_friction> 0.50 </dynamic_friction>
   <rolling_friction> 0.02 </rolling_friction>
<!--   <spring_coeff unit="LBS/FT">       5500.00 </spring_coeff>
   <damping_coeff unit="LBS/FT/SEC">  2750.00 </damping_coeff> -->
   <spring_coeff unit="LBS/FT">       5400.00 </spring_coeff>
   <damping_coeff unit="LBS/FT/SEC">  1750.00 </damping_coeff>

   <max_steer unit="DEG">0</max_steer>
   <brake_group>RIGHT</brake_group>
   <retractable>1</retractable>
  </contact>

  <contact type="STRUCTURE" name="LEFT_WING">
    <location unit="IN">
     <x> 179.40 </x>
     <y> -19.00 </y>
     <z>  -8.97 </z>
    </location>
    <static_friction>  1.00 </static_friction>
    <dynamic_friction> 1.00 </dynamic_friction>
    <spring_coeff unit="LBS/FT">       5500.00 </spring_coeff>
    <damping_coeff unit="LBS/FT/SEC">  5500.00 </damping_coeff>
  </contact>

  <contact type="STRUCTURE" name="RIGHT_WING">
    <location unit="IN">
     <x> 169.40 </x>
     <y>  19.00 </y>
     <z>  -8.97 </z>
    </location>
    <static_friction>  1.00 </static_friction>
    <dynamic_friction> 1.00 </dynamic_friction>
    <spring_coeff unit="LBS/FT">       5500.00 </spring_coeff>
    <damping_coeff unit="LBS/FT/SEC">  5500.00 </damping_coeff>
  </contact>

 </ground_reactions>

 <propulsion>
    <engine file="IO-520-D">
        <location unit="IN">
            <x> 144.40 </x>
            <y> -58.00 </y>
            <z> -40.00 </z>
        </location>
        <orient unit="DEG">
            <pitch> 0.00 </pitch>
            <roll>  0.00 </roll>
            <yaw>   0.00 </yaw>
        </orient>
        <feed>0</feed>
        <thruster file="PHC-J3YF">
            <sense> 1 </sense>
            <location unit="IN">
                <x> 144.40 </x>
                <y> -58.00 </y>
                <z> -40.00 </z>
            </location>
            <orient unit="DEG">
                <pitch> 0.00 </pitch>
                <roll>  0.00 </roll>
                <yaw>   0.00 </yaw>
            </orient>
        </thruster>
  </engine>

    <engine file="IO-520-D">
        <location unit="IN">
            <x> 144.40 </x>
            <y>  58.00 </y>
            <z> -40.00 </z>
        </location>
        <orient unit="DEG">
            <pitch> 0.00 </pitch>
            <roll>  0.00 </roll>
            <yaw>   0.00 </yaw>
        </orient>
        <feed>1</feed>
        <thruster file="PHC-J3YF">
            <sense> -1 </sense>
            <location unit="IN">
                <x> 144.40 </x>
                <y>  58.00 </y>
                <z> -40.00 </z>
            </location>
            <orient unit="DEG">
                <pitch> 0.00 </pitch>
                <roll>  0.00 </roll>
                <yaw>   0.00 </yaw>
            </orient>
        </thruster>
    </engine>

  <tank type="FUEL" number="0">
     <location unit="IN">
       <x> 140.40 </x>
       <y>   -46.00 </y>
       <z>  -8.97 </z>
     </location>
     <capacity unit="LBS"> 582.00 </capacity>
     <contents unit="LBS"> 167.75 </contents>
  </tank>

  <tank type="FUEL" number="1">
     <location unit="IN">
       <x> 140.40 </x>
       <y>   46.00 </y>
       <z>  -8.97 </z>
     </location>
     <capacity unit="LBS"> 582.00 </capacity>
     <contents unit="LBS"> 167.75 </contents>
  </tank>

 </propulsion>

 <flight_control name="FCS: BaronB58">

  <channel name="Pitch">

   <summer name="Pitch Trim Sum">
      <input>fcs/elevator-cmd-norm</input>
      <input>fcs/pitch-trim-cmd-norm</input>
      <clipto>
        <min> -1 </min>
        <max>  1 </max>
      </clipto>
   </summer>

   <aerosurface_scale name="Elevator Control">
      <input>fcs/pitch-trim-sum</input>
      <range>
        <min> -0.35 </min>
        <max>  0.35 </max>
      </range>
      <output>fcs/elevator-pos-rad</output>
   </aerosurface_scale>

   <aerosurface_scale name="elevator normalization">
      <input>fcs/elevator-pos-rad</input>
      <domain>
        <min> -0.35 </min>
        <max>  0.35 </max>
      </domain>
      <range>
        <min> -1 </min>
        <max>  1 </max>
      </range>
      <output>fcs/elevator-pos-norm</output>
   </aerosurface_scale>

  </channel>

  <channel name="Roll">

   <summer name="Roll Trim Sum">
      <input>fcs/aileron-cmd-norm</input>
      <input>fcs/roll-trim-cmd-norm</input>
      <clipto>
        <min> -1 </min>
        <max>  1 </max>
      </clipto>
   </summer>

   <aerosurface_scale name="Left Aileron Control">
      <input>fcs/roll-trim-sum</input>
      <range>
        <min> -0.35 </min>
        <max>  0.35 </max>
      </range>
      <output>fcs/left-aileron-pos-rad</output>
   </aerosurface_scale>

   <aerosurface_scale name="Right Aileron Control">
      <input>fcs/roll-trim-sum</input>
      <range>
        <min> -0.35 </min>
        <max>  0.35 </max>
      </range>
      <output>fcs/right-aileron-pos-rad</output>
   </aerosurface_scale>

   <aerosurface_scale name="left aileron normalization">
      <input>fcs/left-aileron-pos-rad</input>
      <domain>
        <min> -0.35 </min>
        <max>  0.35 </max>
      </domain>
      <range>
        <min> -1 </min>
        <max>  1 </max>
      </range>
      <output>fcs/left-aileron-pos-norm</output>
   </aerosurface_scale>

   <aerosurface_scale name="right aileron normalization">
      <input>fcs/right-aileron-pos-rad</input>
      <domain>
        <min> -0.35 </min>
        <max>  0.35 </max>
      </domain>
      <range>
        <min> -1 </min>
        <max>  1 </max>
      </range>
      <output>fcs/right-aileron-pos-norm</output>
   </aerosurface_scale>

  </channel>

  <channel name="Yaw">

   <summer name="Rudder Command Sum">
      <input>fcs/rudder-cmd-norm</input>
      <input>fcs/yaw-trim-cmd-norm</input>
      <clipto>
        <min> -1 </min>
        <max>  1 </max>
      </clipto>
   </summer>


   <summer name="Rudder Sum">
      <input>fcs/rudder-command-sum</input>
      <clipto>
        <min> -1.1 </min>
        <max>  1.1 </max>
      </clipto>
   </summer>

   <aerosurface_scale name="Rudder Control">
      <input>fcs/rudder-sum</input>
      <domain>
        <min> -1.1 </min>
        <max>  1.1 </max>
      </domain>
      <range>
        <min> -0.16 </min>
        <max>  0.16 </max>
      </range>
      <output>fcs/rudder-pos-rad</output>
   </aerosurface_scale>

   <aerosurface_scale name="rudder normalization">
      <input>fcs/rudder-pos-rad</input>
      <domain>
        <min> -0.16 </min>
        <max>  0.16 </max>
      </domain>
      <range>
        <min> -1 </min>
        <max>  1 </max>
      </range>
      <output>fcs/rudder-pos-norm</output>
   </aerosurface_scale>

  </channel>

  <channel name="Flaps">
   <kinematic name="Flaps Control">
     <input>fcs/flap-cmd-norm</input>
     <traverse>
       <setting>
          <position>  0 </position>
          <time>      0 </time>
       </setting>
       <setting>
          <position> 0.5 </position>
          <time>      4 </time>
       </setting>
       <setting>
          <position> 1 </position>
          <time>      3 </time>
       </setting>
     </traverse>
     <output>fcs/flap-pos-norm</output>
   </kinematic>

   <aerosurface_scale name="flap normalization">
      <input>fcs/flap-pos-norm</input>
      <domain>
        <min>  0 </min>
        <max> 1 </max>
      </domain>
      <range>
        <min> 0 </min>
        <max> 30 </max>
      </range>
      <output>fcs/flap-pos-deg</output>
   </aerosurface_scale>

  <kinematic name="Flaps Lever">
    <input>/controls/flight/flaps</input>
    <traverse>
      <setting>
        <position>0</position>
        <time>0</time>
      </setting>
      <setting>
        <position>1</position>
        <time>1</time>
      </setting>
    </traverse>
    <output>/sim/model/B58-Baron/cockpit/flaps-lever</output>
  </kinematic>

  </channel>

  <channel name="Landing Gear">
   <kinematic name="Gear Control">
     <input>gear/gear-cmd-norm</input>
     <traverse>
       <setting>
          <position> 0 </position>
          <time>     0 </time>
       </setting>
       <setting>
          <position> 1 </position>
          <time>     5 </time>
       </setting>
     </traverse>
     <output>gear/gear-pos-norm</output>
   </kinematic>

  </channel>

 </flight_control>

 <aerodynamics>

  <axis name="LIFT">

    <function name="aero/force/Lift_alpha">
      <description>Lift due to alpha</description>
      <product>
          <property>aero/qbar-psf</property>
          <property>metrics/Sw-sqft</property>
          <table>
            <independentVar lookup="row">aero/alpha-rad</independentVar>
            <tableData>
              -0.20 -0.720
               0.00  0.240
               0.22  1.300
               0.60  0.664
            </tableData>
          </table>
      </product>
    </function>

    <function name="aero/force/Lift_flap">
       <description>Delta Lift due to flaps</description>
       <product>
           <property>aero/qbar-psf</property>
           <property>metrics/Sw-sqft</property>
           <property>fcs/flap-pos-deg</property>
           <value> 0.00633 </value>
       </product>
    </function>

    <function name="aero/force/Lift_elevator">
       <description>Lift due to Elevator Deflection</description>
       <product>
           <property>aero/qbar-psf</property>
           <property>metrics/Sw-sqft</property>
           <property>fcs/elevator-pos-rad</property>
           <value>0.12</value>
       </product>
    </function>

  </axis>

  <axis name="DRAG">

    <function name="aero/force/Drag_basic">
       <description>Drag at zero lift</description>
       <product>
          <property>aero/qbar-psf</property>
          <property>metrics/Sw-sqft</property>
          <table>
            <independentVar lookup="row">aero/alpha-rad</independentVar>
            <tableData>
             -1.57    1.500
             -0.26    0.033
              0.00    0.025
              0.26    0.033
              1.57    1.500
            </tableData>
          </table>
       </product>
    </function>

    <function name="aero/force/Drag_induced">
       <description>Induced drag</description>
         <product>
           <property>aero/qbar-psf</property>
           <property>metrics/Sw-sqft</property>
           <property>aero/cl-squared</property>
           <value>0.041</value>
         </product>
    </function>

    <function name="aero/force/Drag_mach">
       <description>Drag due to mach</description>
        <product>
          <property>aero/qbar-psf</property>
          <property>metrics/Sw-sqft</property>
          <table>
            <independentVar lookup="row">velocities/mach</independentVar>
            <tableData>
                0.00      0.000
                0.72      0.000
                1.10      0.023
                1.80      0.015
            </tableData>
          </table>
        </product>
    </function>

    <function name="aero/force/Drag_flap">
       <description>Drag due to flaps</description>
         <product>
           <property>aero/qbar-psf</property>
           <property>metrics/Sw-sqft</property>
           <property>fcs/flap-pos-deg</property>
           <value> 0.00130 </value>
         </product>
    </function>

    <function name="aero/force/Drag_gear">
       <description>Drag due to gear</description>
         <product>
           <property>aero/qbar-psf</property>
           <property>metrics/Sw-sqft</property>
           <property>gear/gear-pos-norm</property>
           <value>0.03</value>
         </product>
    </function>

    <function name="aero/force/Drag_beta">
       <description>Drag due to sideslip</description>
       <product>
          <property>aero/qbar-psf</property>
          <property>metrics/Sw-sqft</property>
          <table>
            <independentVar lookup="row">aero/beta-rad</independentVar>
            <tableData>
              -1.57    1.230
              -0.26    0.050
               0.00    0.000
               0.26    0.050
               1.57    1.230
            </tableData>
          </table>
       </product>
    </function>

    <function name="aero/force/Drag_elevator">
       <description>Drag due to Elevator Deflection</description>
       <product>
           <property>aero/qbar-psf</property>
           <property>metrics/Sw-sqft</property>
           <abs><property>fcs/elevator-pos-norm</property></abs>
           <value>0.04</value>
       </product>
    </function>

  </axis>

  <axis name="SIDE">

    <function name="aero/force/Side_beta">
       <description>Side force due to beta</description>
       <product>
           <property>aero/qbar-psf</property>
           <property>metrics/Sw-sqft</property>
           <property>aero/beta-rad</property>
           <value>-1</value>
       </product>
    </function>

  </axis>

  <axis name="ROLL">

    <function name="aero/moment/Roll_beta">
       <description>Roll moment due to beta</description>
       <product>
           <property>aero/qbar-psf</property>
           <property>metrics/Sw-sqft</property>
           <property>metrics/bw-ft</property>
           <property>aero/beta-rad</property>
           <value>-0.091</value>
           <table>
               <independentVar lookup="row">aero/alpha-wing-rad</independentVar>
               <tableData>
                   0.279     1
                   0.297     3.5
               </tableData>
           </table>
       </product>
    </function>

    <function name="aero/moment/Roll_damp">
       <description>Roll moment due to roll rate</description>
       <product>
           <property>aero/qbar-psf</property>
           <property>metrics/Sw-sqft</property>
           <property>metrics/bw-ft</property>
           <property>aero/bi2vel</property>
           <property>velocities/p-aero-rad_sec</property>
           <value>-0.472</value>
       </product>
    </function>

    <function name="aero/moment/Roll_yaw">
       <description>Roll moment due to yaw rate</description>
       <product>
           <property>aero/qbar-psf</property>
           <property>metrics/Sw-sqft</property>
           <property>metrics/bw-ft</property>
           <property>aero/bi2vel</property>
           <property>velocities/r-aero-rad_sec</property>
                    <table>
                        <independentVar lookup="row">fcs/flap-pos-deg</independentVar>
                        <tableData>
                             0.0000  0.0798
                             30      0.1246
                        </tableData>
                    </table>
                    <table>
                        <!--
                            stall and spin (3):
                            yaw effect
                        -->
                        <independentVar lookup="row">aero/alpha-wing-rad</independentVar>
                        <independentVar lookup="column">velocities/r-aero-rad_sec</independentVar>
                        <independentVar lookup="table">aero/stall-hyst-norm</independentVar>
                        <tableData breakPoint="0">
                                    -0.15  -0.1   0    0.1   0.15
                            0.279    1      1     1    1     1
                            0.297    35     30    1    30    35
                            0.5      5      5     1    5     5
                        </tableData>
                        <tableData breakPoint="1">
                                    -0.15  -0.1   0    0.1   0.15
                            0.297    35     30    1    30    35
                            0.5      5      5     1    5     5
                        </tableData>
                    </table>
       </product>
    </function>

    <function name="aero/moment/Roll_aileron">
       <description>Roll moment due to aileron</description>
       <product>
          <property>aero/qbar-psf</property>
          <property>metrics/Sw-sqft</property>
          <property>metrics/bw-ft</property>
          <property>fcs/left-aileron-pos-rad</property>
          <value>0.127</value>
       </product>
    </function>

    <function name="aero/moment/Roll_rudder">
       <description>Roll moment due to rudder</description>
       <product>
           <property>aero/qbar-psf</property>
           <property>metrics/Sw-sqft</property>
           <property>metrics/bw-ft</property>
           <property>fcs/rudder-pos-rad</property>
           <value>0.0071</value>
       </product>
    </function>

  </axis>

  <axis name="PITCH">

    <function name="aero/moment/Pitch_alpha">
       <description>Pitch moment due to alpha</description>
       <product>
           <property>aero/qbar-psf</property>
           <property>metrics/Sw-sqft</property>
           <property>metrics/cbarw-ft</property>
           <sin>
               <property>aero/alpha-rad</property>
           </sin>
           <value>-1.8</value>
           <table>
               <independentVar lookup="row">aero/alpha-deg</independentVar>
               <tableData>
                   20    1
                   25    0.6
                   35    0.4
                   45    0.5
                   55    0.4
                   65    0.2
                   90    0.1
               </tableData>
           </table>
       </product>
    </function>

    <function name="aero/moment/Pitch_elevator">
       <description>Pitch moment due to elevator</description>
       <product>
          <property>aero/qbar-psf</property>
          <property>metrics/Sw-sqft</property>
          <property>metrics/cbarw-ft</property>
          <property>fcs/elevator-pos-rad</property>
          <table>
            <independentVar lookup="row">velocities/mach</independentVar>
            <tableData>
              0.0     -1.450
              1.0     -0.250
            </tableData>
          </table>
       </product>
    </function>

    <function name="aero/moment/Pitch_damp">
       <description>Pitch moment due to pitch rate</description>
       <product>
           <property>aero/qbar-psf</property>
           <property>metrics/Sw-sqft</property>
           <property>metrics/cbarw-ft</property>
           <property>aero/ci2vel</property>
           <property>velocities/q-aero-rad_sec</property>
           <value>-22</value>
       </product>
    </function>

    <function name="aero/moment/Pitch_alphadot">
       <description>Pitch moment due to alpha rate</description>
       <product>
           <property>aero/qbar-psf</property>
           <property>metrics/Sw-sqft</property>
           <property>metrics/cbarw-ft</property>
           <property>aero/ci2vel</property>
           <property>aero/alphadot-rad_sec</property>
           <value>-8</value>
       </product>
    </function>

  </axis>

  <axis name="YAW">

    <function name="aero/moment/Yaw_beta">
       <description>Yaw moment due to beta</description>
       <product>
           <property>aero/qbar-psf</property>
           <property>metrics/Sw-sqft</property>
           <property>metrics/bw-ft</property>
           <property>aero/beta-rad</property>
           <value>0.12</value>
       </product>
    </function>

    <function name="aero/moment/Yaw_damp">
       <description>Yaw moment due to yaw rate</description>
       <product>
           <property>aero/qbar-psf</property>
           <property>metrics/Sw-sqft</property>
           <property>metrics/bw-ft</property>
           <property>aero/bi2vel</property>
           <property>velocities/r-aero-rad_sec</property>
           <value>-0.15</value>
       </product>
    </function>

    <function name="aero/moment/Yaw_rudder">
       <description>Yaw moment due to rudder</description>
       <product>
           <property>aero/qbar-psf</property>
           <property>metrics/Sw-sqft</property>
           <property>metrics/bw-ft</property>
           <property>fcs/rudder-pos-rad</property>
           <value>-0.04</value>
       </product>
    </function>

    <function name="aero/moment/Yaw_aileron">
       <description>Adverse yaw</description>
       <product>
           <property>aero/qbar-psf</property>
           <property>metrics/Sw-sqft</property>
           <property>metrics/bw-ft</property>
           <property>fcs/left-aileron-pos-rad</property>
           <value>-0.01</value>
       </product>
    </function>

  </axis>

 </aerodynamics>

 <external_reactions>
 </external_reactions>

</fdm_config>
